# Programm: X - Benennung
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# Benutzte Literatur:
# Angabe:
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F_ymax := 4905 N
l_1 := □  # error: Fehlender Term oder Ausdruck.
l_2 := □  # error: Fehlender Term oder Ausdruck.
F_y := 3/8*4905 N = 1839.38 N
# Aufgabenstellung:
# - Modellauswahl
# - Datenerhebung
# - Lagerkräfte und erforderlichen Wellendurchmesser bestimmen
# - Lagerauswahl
# - Lebensdauerberechnung
# - Dokumentation
# Berechnung:
# Lagerkräfte max:
F_Aymax := F_ymax = 4905 N
solve block
    # guess values
    F_x := 500 N
    F_Ly := 500 N
    F_Lx := 500 N
    F_L := 800 N
    F_W := 500 N
    # constraints
    0 == -F_Ay + F_By + F_C
    F == sqrt(F_y^2 + F_x^2)
    0 == F_Ax - F_Bx
    F_L == sqrt(F_Ly^2 + F_Lx^2)
end solve block
# Ergebnisse:
